<Lems>

    <!-- Specify which component to run -->
    <Target component="sim1" />

    <!-- Include core NeuroML2 ComponentType definitions -->
    <Include file="Cells.xml" />
    <Include file="Networks.xml" />
    <Include file="Simulation.xml" />

    <Include file="JR.net.nml" />

    <Simulation id="sim1" length="1s" step="0.01ms" target="net1">

        <Display id="d0" title="Rates" timeScale="1s" xmin="-100" xmax="1100" ymin="-5" ymax="100">
            <Line id="y0" quantity="Pop1[0]/y0" scale="1" color="#ee40FF" timeScale="1ms" />
            <Line id="y1" quantity="Pop1[0]/y1" scale="1" color="#aaa0FF" timeScale="1ms" />
            <Line id="y2" quantity="Pop1[0]/y2" scale="1" color="#2ee221" timeScale="1ms" />
        </Display>

        <Display id="d1" title="Rates derivs" timeScale="1s" xmin="-100" xmax="1100" ymin="-3" ymax="3">
            <Line id="y3" quantity="Pop1[0]/y3" scale="1" color="#e1f221" timeScale="1ms" />
            <Line id="y4" quantity="Pop1[0]/y4" scale="1" color="#ff0000" timeScale="1ms" />
            <Line id="y5" quantity="Pop1[0]/y5" scale="1" color="#0000ff" timeScale="1ms" />
        </Display>

    </Simulation>

</Lems>
